# OpenSim document version 30517
AnalyzeTool jumper:
  replace_force_set: false
  force_set_files: reserve_actuators.xml
  results_directory: Results_PlantarflexorOutputs
  output_precision: 8
  initial_time: 0.63
  final_time: 1.895
  solve_for_equilibrium_for_auxiliary_states: false
  maximum_number_of_integrator_steps: 20000
  maximum_integrator_step_size: 1
  minimum_integrator_step_size: 1e-8
  integrator_error_tolerance: 1e-5
  external_loads_file: jump_forces.xml
  states_file: Results_CMC/cmc_states.sto
  lowpass_cutoff_frequency_for_coordinates: -1
  AnalysisSet Analyses:
    OutputReporter: output_paths=(|com_position bodyset/hand_r|position forceset/soleus_r|active_force_length_multiplier forceset/gastroc_r|active_force_length_multiplier)
        start_time=0.63 end_time=1.895 step_interval=1 in_degrees=true
