# OpenSim document version 40000
MarkerSet:
  Marker Marqueur_pelvis: ground (0 0.93 0)
  Marker Marqueur_femur_r: ground (-0.0641847 0.849781 0.0779238)
  Marker Marqueur_tibia_r: ground (-0.0639132 0.448619 0.0767175)
  Marker Marqueur_talus_r: ground (-0.0741778 0.0100745 0.0767175)
  Marker Marqueur_femur_l: ground (-0.0641847 0.849781 -0.0779238)
  Marker Marqueur_tibia_l: ground (-0.0636999 0.460418 -0.0767934)
  Marker Marqueur_talus_l: ground (-0.073938 0.0260645 -0.0767934)
  Marker Marqueur_torso: ground (-0.114852 1.0133 0)
  Marker Marqueur_humerus_r: ground (-0.111697 1.4038 0.214548)
  Marker Marqueur_radius_r: ground (-0.10528 1.10452 0.231036)
  Marker Marqueur_hand_r: ground (-0.114077 0.868674 0.244646)
  Marker Marqueur_humerus_l: ground (-0.111697 1.4038 -0.214548)
  Marker Marqueur_radius_l: ground (-0.10528 1.10452 -0.231036)
  Marker Marqueur_hand_l: ground (-0.114077 0.868674 -0.244646)
