# OpenSim document version 44000
IMUInverseKinematicsTool:
  time_range: 0 20
  sensor_to_opensim_rotations: -1.570796 0 0
  model_file: Rajagopal_2015_sup_calibrated.osim
  orientations_file: Xsens_quaternion.sto
  results_directory: IKResults
  coord_task: coord_name=pelvis_tilt weight=0
  coord_task: coord_name=pelvis_list weight=0
  coord_task: coord_name=pelvis_rotation weight=0
  coord_task: coord_name=pelvis_tx weight=0
  coord_task: coord_name=pelvis_ty weight=0
  coord_task: coord_name=pelvis_tz weight=0
