# OpenSim document version 44000
XsensDataReaderSettings:
  trial_prefix: Xsens
  # List of Experimental sensors and desired associated names in resulting tables
  ExperimentalSensors:
    ExperimentalSensor _1: name_in_model=torso_imu
    ExperimentalSensor _2: name_in_model=humerus_l_imu
    ExperimentalSensor _3: name_in_model=radius_l_imu
    ExperimentalSensor _4: name_in_model=humerus_r_imu
    ExperimentalSensor _5: name_in_model=radius_r_imu
  # Add metadata
